Zini := 65
Z_1 := Zini/10^-0.2 = 103.018
Z_2 := Zini = 65
Z_3 := Zini/10^-0.25 = 115.588
Z_12 := (1/Z_2 + 1/Z_1)^-1 = 39.8539
Z_4 := Zini/10^-0.1 = 81.8302
Z_34 := (1/Z_4 + 1/Z_3)^-1 = 47.9114
Z_1234 := (1/Z_34 + 1/Z_12)^-1 = 21.7564
inter_2 := (50 + Z_1)/2 = 76.509
inter_3 := (50 + Z_3)/2 = 82.7941
Z_02d := sqrt(50*Z_2) = 57.0088  # Ω
Z_03 := sqrt(50*Z_3) = 76.0224
inter_4 := (50 + Z_4)/2 = 65.9151
Z_1_2 := 60
Z_01d := sqrt(inter_2*Z_1) = 88.7796
Z_01i := sqrt(50*inter_2) = 61.8502
Z_01_2 := sqrt(Z_12*Z_1_2) = 48.9002
Z_03i := sqrt(inter_3*Z_3) = 97.8265
Z_03d := sqrt(50*inter_2) = 61.8502
Z_3_4 := Z_1_2*(10^-0.2 + 1)/(10^-0.25 + 10^-0.1) = 72.1306
Z_04i := sqrt(inter_4*Z_4) = 73.4428
Z_04d := sqrt(50*inter_4) = 57.4087
Z_fin := (1/Z_3_4 + 1/Z_1_2)^-1 = 32.7542
Z03_4 := sqrt(Z_34*Z_3_4) = 58.7868
Z_0fin := sqrt(Z_fin*50) = 40.4687
