K := sqrt(10^0/10^-0.2) = 1.25893
Z_ref := 53
Z_0H := 36
Z_0V1 := Z_ref*(1 + sqrt(1 + K^2))/K = 109.785
Z_0V2 := Z_0H^2*(Z_ref^2 + Z_0V1^2)/(2*Z_0V1*Z_ref^2) = 31.2285
P := 10^-0.1/(10^-0.2 + 1) = 0.487032
Z_0 := sqrt(50*Z_ref) = 51.4782
Z_24 := 37
Z_1 := Z_24/P = 75.9704
Z_p := (1/Z_1 + 1/Z_24)^-1 = 24.8818
inter_3 := (50 + Z_p)/2 = 37.4409
Z_024 := sqrt(Z_ref*Z_24) = 44.2832
Z_01 := sqrt(Z_ref*Z_1) = 63.4542
