P_3 := 10^-0.2
P_2 := 10^-0.3
Z_23 := 50
K_1 := sqrt(P_3/P_2) = 1.12202
R_1 := ((1 + K_1^2)/K_1)*Z_23 = 100.663
Z_02 := K_1*sqrt(R_1*Z_23) = 79.6014
Z_03 := (1/K_1)*sqrt(R_1*Z_23) = 63.2297
Z_L2 := K_1*Z_23 = 56.1009
Z_L3 := Z_23/K_1 = 44.5625
